// COMSOL Multiphysics 5.2.0.166 model "Test Pyramid 300 nm H, 300 nm edge.mph"
// Probe spectr
// Outline of the model tree

Parameters
  rad = 300 [nm]
  H = 250 [nm]  // 25-8.91
  fre = 636 [THz]
  k0 = 2*pi*fre/300000000 [Hz*m]
  w_pml = 50[nm]
  rad_hole = 37.5e-6[m]
  R = 600 [nm]
  r_pml = 200 [nm]
  eps0 = 8.854*10^(-12) [F/m]
  el = 1.6*10^(-19) [C]
  ed = 1 [1/nm]
  rat = 0.55  // Pyramid ratio

Functions
  int1: Interpolation "Re Epsilon Si"
    funcname = reeps
    table = 
      {362.90323, 13.488}
      {387.09677, 13.793}
      {411.29032, 14.079}
      {435.48387, 14.413}
      {459.67742, 14.797}
      {483.87097, 15.254}
      {508.06452, 15.754}
      {532.25806, 16.334}
      {556.45161, 16.994}
      {580.64516, 17.761}
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    argunit = THz
    fununit = 1
  int2: Interpolation "Im Epsilon Si"
    funcname = imeps
    table = 
      {362.90323, 0.038}
      {387.09677, 0.057}
      {411.29032, 0.078}
      {435.48387, 0.099}
      {459.67742, 0.126}
      {483.87097, 0.172}
      {508.06452, 0.236}
      {532.25806, 0.26}
      {556.45161, 0.396}
      {580.64516, 0.508}
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    argunit = THz
    fununit = 1

Coordinate systems
  pml1: PML "Perfectly Matched Layer 1" on domains 1 | ScalingType = Spherical

Geometry
  geom1 "Geometry 1" (3D, length unit m)
    sph1: Sphere (disabled) | r = rad
    sph2: Sphere | r = R
    sph3: Sphere | r = R+r_pml
    cyl1: Cylinder (disabled) | pos = {0, 0, -H/2}; axis = {0, 0, 1}; r = rad; h = H
    cyl2: Cylinder (disabled) | axis = {1, 0, 0}; r = rad_hole; h = H
    pyr1: Pyramid | pos = {-H/4, 0, 0}; axistype = x; a = rad; b = rad; h = H; rat = 0; displ = {0, 0}
    cone1: Cone (disabled) | pos = {0, 0, -H/4}; r = rad; h = H; specifytop = radius; rtop = 0
    fin: Finalize "Form Union"

Materials
  mat1: Common "Material 1" on domains 3
    def "Basic"
      relpermittivity = reeps(fre)-i*imeps(fre)
      relpermeability = 1
      electricconductivity = 0
  mat2: Common "Material 2" on domains 1, 2
    def "Basic"
      relpermittivity = 1
      relpermeability = 1
      electricconductivity = 0

Physics
  emw: ElectromagneticWaves "Electromagnetic Waves, Frequency Domain" on all domains
    dependent variable E = {Ex, Ey, Ez}
    BackgroundField.SolveFor = scatteredField
    BackgroundField.Eb = {exp(-1i*k0*z), 0, 0}
    BackgroundField.w0 = 0
    BackgroundField.Ebg = {0, 0, 0}
    wee1: WaveEquationElectric (default)
    pec1: PerfectElectricConductor (default)
    init1: init "Initial Values 1" (default)
    ffd1: FarFieldDomain on domains 2
      ffc1: FarFieldCalculation on boundaries adjacent to domains 2, 3

Mesh
  mesh1 "Mesh 1"
    size: MeshSizeDefault | hmin = 2E-8; hauto = 4; custom = on
    ftet3: FreeTet "Free Tetrahedral 3" on remaining entities
      size1: Size on domains 3 | hmax = 1.5E-8; hmin = 2E-10; hauto = 1; custom = on
    ftet2: FreeTet "Free Tetrahedral 2" on remaining entities
      size1: Size on domains 1, 2 | hauto = 3

Studies
  std1 "Study 1"
    param: Parametric "Parametric Sweep"
      sweeptype = filled
      pname = {fre, H}
      plistarr = {range(210[THz],5[THz],800[THz]), 300}
      punit = {, nm}
    freq: Frequency "Frequency Domain" | plist = fre; preusesol = yes; punit = Hz

Solver configurations
  sol1 "Solver 1" (study std1)
    v1: Variables "Dependent Variables 1"
    s1: Stationary "Stationary Solver 1" | stol = 0.0010
      dDef: Direct | linsolver = spooles
      p1: Parametric | pname = freq; plistarr = fre; pcontinuationmode = no
      fc1: FullyCoupled
  sol2 "Parametric 2" (study std1)

Datasets
  dset1: Solution | solution = sol1
  dset2: Solution | solution = sol2

Derived values
  int1: IntVolume "px" on domains 3 | data = dset2; table = tbl1; expr = emw.Px; unit = C*m
  int2: IntVolume "py" on domains 3 | data = dset2; table = tbl11; expr = emw.Py; unit = C*m
  int3: IntVolume "pz" on domains 3 | data = dset2; table = tbl12; expr = emw.Pz; unit = C*m
  int4: IntVolume "mx" on domains 3 | data = dset2; table = tbl13; expr = (1i*fre*pi)*(emw.Py*z-emw.Pz*y); unit = m^2*A
  int5: IntVolume "my" on domains 3 | data = dset2; table = tbl14; expr = (1i*fre*pi)*(emw.Pz*x-emw.Px*z); unit = m^2*A
  int6: IntVolume "mz" on domains 3 | data = dset2; table = tbl15; expr = (1i*fre*pi)*(emw.Px*y-emw.Py*x); unit = m^2*A
  int7: IntSurface "Scattering CS" on boundaries 5-8, 16, 17, 19, 20
    data = dset2
    table = tbl16
    expr = emw.relPoavx*nx+emw.relPoavy*ny+emw.relPoavz*nz
    unit = W
  int32: IntVolume "Tx" on domains 3
    data = dset2
    table = tbl17
    expr = 0.2*pi*1i*fre*((2*(x*x+y*y+z*z))*emw.Px-(x*emw.Px+y*emw.Py+z*emw.Pz)*x)
    unit = m^3*A
  int39: IntVolume "Ty" on domains 3
    data = dset2
    table = tbl18
    expr = 0.2*pi*1i*fre*((2*(x*x+y*y+z*z))*emw.Py-(x*emw.Px+y*emw.Py+z*emw.Pz)*y)
    unit = m^3*A
  int40: IntVolume "Tz" on domains 3
    data = dset2
    table = tbl19
    expr = 0.2*pi*1i*fre*((2*(x*x+y*y+z*z))*emw.Pz-(x*emw.Px+y*emw.Py+z*emw.Pz)*z)
    unit = m^3*A
  int33: IntVolume "Qxx 1" on domains 3 | data = dset2; table = tbl20; expr = 6*(emw.Px*x-x*emw.Px/3); unit = m^2*s*A
  int34: IntVolume "Qyy 1" on domains 3 | data = dset2; table = tbl21; expr = 6*(emw.Py*y-y*emw.Py/3); unit = m^2*s*A
  int35: IntVolume "Qzz 1" on domains 3 | data = dset2; table = tbl22; expr = 6*(emw.Pz*z-z*emw.Pz/3); unit = m^2*s*A
  int36: IntVolume "Qxy 1" on domains 3
    data = dset2
    table = tbl23
    expr = 3*(emw.Px*y+emw.Py*x)
    unit = m^2*s*A
    descr = same as for w/o T
  int37: IntVolume "Qxz 1" on domains 3 | data = dset2; table = tbl24; expr = 3*(emw.Px*z+emw.Pz*x); unit = m^2*s*A
  int65: IntVolume "Qyx 1" on domains 3
    data = dset2
    table = tbl25
    expr = 3*(emw.Py*x+emw.Px*y)
    unit = m^2*s*A
    descr = same as for w/o T
  int66: IntVolume "Qzx 1" on domains 3
    data = dset2
    table = tbl26
    expr = 3*(emw.Pz*x+emw.Px*z)
    unit = m^2*s*A
    descr = same as for w/o T
  int67: IntVolume "Qzy 1" on domains 3
    data = dset2
    table = tbl27
    expr = 3*(emw.Pz*y+emw.Py*z)
    unit = m^2*s*A
    descr = same as for w/o T
  int38: IntVolume "Qyz 1" on domains 3
    data = dset2
    table = tbl28
    expr = 3*(emw.Py*z+emw.Pz*y)
    unit = m^2*s*A
    descr = same as for w/o T
  int41: IntVolume "Mxx 1" on domains 3
    data = dset2
    table = tbl29
    expr = (2*pi*fre/(3*1i))*((emw.Py*z-emw.Pz*y)*x+x*(emw.Py*z-emw.Pz*y))
    unit = m^3*A
  int42: IntVolume "Myy 1" on domains 3
    data = dset2
    table = tbl30
    expr = (2*pi*fre/(3*1i))*((emw.Pz*x-emw.Px*z)*y+y*(emw.Pz*x-emw.Px*z))
    unit = m^3*A
  int43: IntVolume "Mzz 1" on domains 3
    data = dset2
    table = tbl31
    expr = (2*pi*fre/(3*1i))*((emw.Px*y-emw.Py*x)*z+z*(emw.Px*y-emw.Py*x))
    unit = m^3*A
  int44: IntVolume "Mxy 1" on domains 3
    data = dset2
    table = tbl32
    expr = (2*pi*fre/(3*1i))*((emw.Py*z-emw.Pz*y)*y+x*(emw.Pz*x-emw.Px*z))
    unit = m^3*A
  int45: IntVolume "Mxz 1" on domains 3
    data = dset2
    table = tbl33
    expr = (2*pi*fre/(3*1i))*((emw.Py*z-emw.Pz*y)*z+x*(emw.Pz*x-emw.Px*z))
    unit = m^3*A
  int46: IntVolume "Mzx 1" on domains 3
    data = dset2
    table = tbl34
    expr = (2*pi*fre/(3*1i))*((emw.Px*y-emw.Py*x)*x+z*(emw.Py*z-emw.Pz*y))
    unit = m^3*A
  int47: IntVolume "Mzy 1" on domains 3
    data = dset2
    table = tbl35
    expr = (2*pi*fre/(3*1i))*((emw.Px*y-emw.Py*x)*y+z*(emw.Pz*x-emw.Px*z))
    unit = m^3*A
  int48: IntVolume "Myx 1" on domains 3
    data = dset2
    table = tbl36
    expr = (2*pi*fre/(3*1i))*((emw.Pz*x-emw.Px*z)*x+y*(emw.Py*z-emw.Pz*y))
    unit = m^3*A
  int49: IntVolume "Myz 1" on domains 3
    data = dset2
    table = tbl37
    expr = (2*pi*fre/(3*1i))*((emw.Pz*x-emw.Px*z)*z+y*(emw.Px*y-emw.Py*x))
    unit = m^3*A
  int50: IntVolume "Oxxx 1" on domains 3 | data = dset2; table = tbl38; expr = (3*emw.Px*x*x); unit = m^3*s*A
  int68: IntVolume "Oxxz 1" on domains 3 | data = dset2; table = tbl39; expr = (2*emw.Px*x*z+emw.Pz*x*x); unit = m^3*s*A
  int63: IntVolume "Ozzx 1" on domains 3 | data = dset2; table = tbl40; expr = (emw.Px*z*z+2*emw.Pz*x*z); unit = m^3*s*A
  int70: IntVolume "Ozzy 1" on domains 3 | data = dset2; table = tbl41; expr = (emw.Py*z*z+2*emw.Pz*y*z); unit = m^3*s*A
  int51: IntVolume "Oyyy 1" on domains 3 | data = dset2; table = tbl42; expr = (3*emw.Py*y*y); unit = m^3*s*A
  int52: IntVolume "Ozzz 1" on domains 3 | data = dset2; table = tbl43; expr = (3*emw.Pz*z*z); unit = m^3*s*A
  int53: IntVolume "Oxxy 1" on domains 3 | data = dset2; table = tbl44; expr = (2*emw.Px*x*y+emw.Py*x*x); unit = m^3*s*A
  int54: IntVolume "Oyyx 1" on domains 3 | data = dset2; table = tbl45; expr = (emw.Px*y*y+2*emw.Py*x*y); unit = m^3*s*A
  int69: IntVolume "Oyyz 1" on domains 3 | data = dset2; table = tbl46; expr = (emw.Pz*y*y+2*emw.Py*z*y); unit = m^3*s*A
  int55: IntVolume "Oxyz 1" on domains 3
    data = dset2
    table = tbl47
    expr = (emw.Px*y*z+emw.Py*z*x+emw.Pz*x*y)
    unit = m^3*s*A
  int56: IntVolume "Lambda x" on domains 3
    data = dset2
    table = tbl48
    expr = 0.2*((x*x+y*y+z*z)*emw.Px+2*((x*emw.Px+y*emw.Py+z*emw.Pz)*x))
    unit = m^3*s*A
  int57: IntVolume "Lambda y" on domains 3
    data = dset2
    table = tbl49
    expr = 0.2*(((x*x+y*y+z*z)*emw.Py+2*(x*emw.Px+y*emw.Py+z*emw.Pz)*y))
    unit = m^3*s*A
  int58: IntVolume "Lambda z" on domains 3
    data = dset2
    table = tbl50
    expr = 0.2*((x*x+y*y+z*z)*emw.Pz+2*((x*emw.Px+y*emw.Py+z*emw.Pz)*z))
    unit = m^3*s*A
  int59: IntVolume "q" on domains 3 | data = dset2; table = tbl51; expr = 2*(x*emw.Px+y*emw.Py+z*emw.Pz); unit = m^2*s*A
  int60: IntVolume "Nx" on domains 3
    data = dset2
    table = tbl52
    expr = (4*pi*fre/(3*1i))*((x*x+y*y+z*z)*emw.Px-(x*emw.Px+y*emw.Py+z*emw.Pz)*x)
    unit = m^3*A
  int61: IntVolume "Ny" on domains 3
    data = dset2
    table = tbl53
    expr = (4*pi*fre/(3*1i))*((x*x+y*y+z*z)*emw.Py-(x*emw.Px+y*emw.Py+z*emw.Pz)*y)
    unit = m^3*A
  int62: IntVolume "Nz" on domains 3
    data = dset2
    table = tbl54
    expr = (4*pi*fre/(3*1i))*((x*x+y*y+z*z)*emw.Pz-(x*emw.Px+y*emw.Py+z*emw.Pz)*z)
    unit = m^3*A
  int64: IntVolume "Absorption CS" on domains 3 | data = dset2; table = tbl55; expr = emw.Qe; unit = W
  pev2: EvalPoint "Forward Scattering" on points 11
    data = dset2
    table = tbl56
    expr = emw.relPoavx*nx+emw.relPoavy*ny+emw.relPoavz*nz
  pev4: EvalPoint "Backward Scattering" on points 10
    data = dset2
    table = tbl57
    expr = emw.relPoavx*nx+emw.relPoavy*ny+emw.relPoavz*nz
  int72: IntSurface "Forward Scattering Int" on boundaries 6, 8, 17, 20
    data = dset2
    table = tbl58
    expr = emw.relPoavx*nx+emw.relPoavy*ny+emw.relPoavz*nz
  int74: IntSurface "Backward Scattering Int" on boundaries 1, 3, 14, 18
    data = dset2
    table = tbl59
    expr = emw.relPoavx*nx+emw.relPoavy*ny+emw.relPoavz*nz

Plots
  pg1: PlotGroup3D "Electric Field (emw)" | data = dset2
    mslc1: Multislice
      expr = emw.Ex
      multiplanexmethod = coord
      xcoord = 0
      multiplaneymethod = coord
      ycoord = 0
      multiplanezmethod = coord
      zcoord = 0
  pg3: PlotGroup3D "3D Plot Group 3" | data = dset2
    slc1: Slice | expr = emw.normE; quickplane = zx; quickynumber = 1; genpoints = {{0, 0, 0}, {1, 0, 0}, {0, 1, 0}}
  pg4: PlotGroup3D "3D Plot Group 4" | data = dset2
    slc1: Slice | expr = emw.normE; quickplane = zx; quickynumber = 1; genpoints = {{0, 0, 0}, {1, 0, 0}, {0, 1, 0}}
  pg5: PlotGroup3D "3D Plot Group 5" | data = dset2
    slc1: Slice | expr = emw.normE; quickplane = zx; quickynumber = 1; genpoints = {{0, 0, 0}, {1, 0, 0}, {0, 1, 0}}
  pg6: PlotGroup3D "Electric Field (emw) 1" | data = dset2
    mslc1: Multislice | expr = emw.Ebx
  pg7: PlotGroup3D "Electric Field (emw) 2" | data = dset1
    mslc1: Multislice | expr = emw.normE
  pg8: PlotGroup3D "3D Plot Group 8" | data = dset1
    ff1: FarField | data = dset2; expr = 0.0027*(1/2)*abs(emw.normEfar)^2*1E17
  pg9: PolarGroup "Polar Plot Group 9" | data = dset1
    ff1: FarField | data = dset2; expr = 0.0027*(1/2)*abs(emw.normEfar)^2*1E17; normal = {1, 0, 0}
    lngr1: LineGraph on edges 6, 7, 26, 28
      expr = 0.0027*(1/2)*abs(emw.normEfar)^2*1E17
      xdata = expr
      xdataexpr = atan2(x,z)+pi/2

Exports
  tbl1: Table "Px"
    table = tbl1
    filename = C:\Users\p.terekhov\Documents\Comsol Export\TempSpace for actual export\Px.txt
  tbl2: Table "Py"
    table = tbl11
    filename = C:\Users\p.terekhov\Documents\Comsol Export\TempSpace for actual export\Py.txt
  tbl3: Table "Pz"
    table = tbl12
    filename = C:\Users\p.terekhov\Documents\Comsol Export\TempSpace for actual export\Pz.txt
  tbl4: Table "mx"
    table = tbl13
    filename = C:\Users\p.terekhov\Documents\Comsol Export\TempSpace for actual export\mx.txt
  tbl6: Table "my"
    table = tbl14
    filename = C:\Users\p.terekhov\Documents\Comsol Export\TempSpace for actual export\my.txt
  tbl7: Table "mz"
    table = tbl15
    filename = C:\Users\p.terekhov\Documents\Comsol Export\TempSpace for actual export\mz.txt
  tbl8: Table "Scattering"
    table = tbl16
    filename = C:\Users\p.terekhov\Documents\Comsol Export\TempSpace for actual export\scat.txt
  tbl9: Table "Tx"
    table = tbl17
    filename = C:\Users\p.terekhov\Documents\Comsol Export\TempSpace for actual export\Tx.txt
  tbl10: Table "Ty"
    table = tbl18
    filename = C:\Users\p.terekhov\Documents\Comsol Export\TempSpace for actual export\Ty.txt
  tbl11: Table "Tz"
    table = tbl19
    filename = C:\Users\p.terekhov\Documents\Comsol Export\TempSpace for actual export\Tz.txt
  tbl12: Table "Qxx"
    table = tbl20
    filename = C:\Users\p.terekhov\Documents\Comsol Export\TempSpace for actual export\Qxx.txt
  tbl13: Table "Qyy"
    table = tbl21
    filename = C:\Users\p.terekhov\Documents\Comsol Export\TempSpace for actual export\Qyy.txt
  tbl14: Table "Qzz"
    table = tbl22
    filename = C:\Users\p.terekhov\Documents\Comsol Export\TempSpace for actual export\Qzz.txt
  tbl15: Table "Qxy"
    table = tbl23
    filename = C:\Users\p.terekhov\Documents\Comsol Export\TempSpace for actual export\Qxy.txt
  tbl16: Table "Qxz"
    table = tbl24
    filename = C:\Users\p.terekhov\Documents\Comsol Export\TempSpace for actual export\Qxz.txt
  tbl17: Table "Qyx"
    table = tbl25
    filename = C:\Users\p.terekhov\Documents\Comsol Export\TempSpace for actual export\Qyx.txt
  tbl18: Table "Qzx"
    table = tbl26
    filename = C:\Users\p.terekhov\Documents\Comsol Export\TempSpace for actual export\Qzx.txt
  tbl19: Table "Qzy"
    table = tbl27
    filename = C:\Users\p.terekhov\Documents\Comsol Export\TempSpace for actual export\Qzy.txt
  tbl20: Table "Qyz"
    table = tbl28
    filename = C:\Users\p.terekhov\Documents\Comsol Export\TempSpace for actual export\Qyz.txt
  tbl21: Table "Mxx"
    table = tbl29
    filename = C:\Users\p.terekhov\Documents\Comsol Export\TempSpace for actual export\Mxx.txt
  tbl22: Table "Myy"
    table = tbl30
    filename = C:\Users\p.terekhov\Documents\Comsol Export\TempSpace for actual export\Myy.txt
  tbl23: Table "Mzz"
    table = tbl31
    filename = C:\Users\p.terekhov\Documents\Comsol Export\TempSpace for actual export\Mzz.txt
  tbl24: Table "Mxy"
    table = tbl32
    filename = C:\Users\p.terekhov\Documents\Comsol Export\TempSpace for actual export\Mxy.txt
  tbl25: Table "Mxz"
    table = tbl33
    filename = C:\Users\p.terekhov\Documents\Comsol Export\TempSpace for actual export\Mxz.txt
  tbl26: Table "Mzx"
    table = tbl34
    filename = C:\Users\p.terekhov\Documents\Comsol Export\TempSpace for actual export\Mzx.txt
  tbl27: Table "Mzy"
    table = tbl35
    filename = C:\Users\p.terekhov\Documents\Comsol Export\TempSpace for actual export\Mzy.txt
  tbl28: Table "Myx"
    table = tbl36
    filename = C:\Users\p.terekhov\Documents\Comsol Export\TempSpace for actual export\Myx.txt
  tbl29: Table "Myz"
    table = tbl37
    filename = C:\Users\p.terekhov\Documents\Comsol Export\TempSpace for actual export\Myz.txt
  tbl30: Table "Oxxx"
    table = tbl38
    filename = C:\Users\p.terekhov\Documents\Comsol Export\TempSpace for actual export\Oxxx.txt
  tbl31: Table "Oxxz"
    table = tbl39
    filename = C:\Users\p.terekhov\Documents\Comsol Export\TempSpace for actual export\Oxxz.txt
  tbl32: Table "Ozzx"
    table = tbl40
    filename = C:\Users\p.terekhov\Documents\Comsol Export\TempSpace for actual export\Ozzx.txt
  tbl33: Table "Ozzy"
    table = tbl41
    filename = C:\Users\p.terekhov\Documents\Comsol Export\TempSpace for actual export\Ozzy.txt
  tbl34: Table "Oyyy"
    table = tbl42
    filename = C:\Users\p.terekhov\Documents\Comsol Export\TempSpace for actual export\Oyyy.txt
  tbl35: Table "Ozzz"
    table = tbl43
    filename = C:\Users\p.terekhov\Documents\Comsol Export\TempSpace for actual export\Ozzz.txt
  tbl36: Table "Oxxy"
    table = tbl44
    filename = C:\Users\p.terekhov\Documents\Comsol Export\TempSpace for actual export\Oxxy.txt
  tbl37: Table "Oyyx"
    table = tbl45
    filename = C:\Users\p.terekhov\Documents\Comsol Export\TempSpace for actual export\Oyyx.txt
  tbl38: Table "Oyyz"
    table = tbl46
    filename = C:\Users\p.terekhov\Documents\Comsol Export\TempSpace for actual export\Oyyz.txt
  tbl39: Table "Labmdax"
    table = tbl48
    filename = C:\Users\p.terekhov\Documents\Comsol Export\TempSpace for actual export\Lambdax.txt
  tbl40: Table "Lambday"
    table = tbl49
    filename = C:\Users\p.terekhov\Documents\Comsol Export\TempSpace for actual export\Lambday.txt
  tbl41: Table "Lambdaz"
    table = tbl50
    filename = C:\Users\p.terekhov\Documents\Comsol Export\TempSpace for actual export\Lambdaz.txt
  tbl42: Table "q"
    table = tbl51
    filename = C:\Users\p.terekhov\Documents\Comsol Export\TempSpace for actual export\q.txt
  tbl43: Table "Nx"
    table = tbl52
    filename = C:\Users\p.terekhov\Documents\Comsol Export\TempSpace for actual export\Nx.txt
  tbl44: Table "Ny"
    table = tbl53
    filename = C:\Users\p.terekhov\Documents\Comsol Export\TempSpace for actual export\Ny.txt
  tbl45: Table "Nz"
    table = tbl54
    filename = C:\Users\p.terekhov\Documents\Comsol Export\TempSpace for actual export\Nz.txt
  tbl46: Table "AbsCS"
    table = tbl55
    filename = C:\Users\p.terekhov\Documents\Comsol Export\TempSpace for actual export\AbsCS.txt
  tbl47: Table "Oxyz"
    table = tbl47
    filename = C:\Users\p.terekhov\Documents\Comsol Export\TempSpace for actual export\Oxyz.txt
  tbl48: Table "ForScatPoint"
    table = tbl56
    filename = C:\Users\p.terekhov\Documents\Comsol Export\TempSpace for actual export\ForScatPoint.txt
  tbl49: Table "BackScatPoint"
    table = tbl57
    filename = C:\Users\p.terekhov\Documents\Comsol Export\TempSpace for actual export\BackScatPoint.txt
  tbl50: Table "ForScat"
    table = tbl58
    filename = C:\Users\p.terekhov\Documents\Comsol Export\TempSpace for actual export\ForScat.txt
  tbl51: Table "BackScat"
    table = tbl59
    filename = C:\Users\p.terekhov\Documents\Comsol Export\TempSpace for actual export\BackScat.txt